# Input script to debug the threebody/table command
# Initialization
units lj
dimension 3
boundary p p p

# Styles of atoms and that stuff
atom_style atomic
pair_style hybrid/overlay zero 0.0 table/omp linear 5000000 threebody/table

newton on

# Create simulaiton box
region simulation_box block -$L $L -$L $L -$L $L
# N-atom-types region-ID keyword value Is necesesary the extra/special/per/atom (# of special neighbors per atom)
create_box 2 simulation_box

# Atom types
mass 1 1.0      # PA
mass 2 1.0      # PB

# Coefficients
include potential.in

# Particles
region spawn_box block -$L $L -$L $L -$L $L

# One PA
create_atoms 1 single 0.7 0.7 0.7


# Patch B
create_atoms 2 single 0.0 0.0 0.0

# Patch B
create_atoms 2 single -0.75 0.0 0.0

# Create groups for the threebody potential
group PA type 1
group PB type 2

group PAm id 3

# Neighbor list
neighbor 1.8 bin # extra-distance style

# COMPUTES

# Compute global kinetic and potential energy and temperature
compute t all temp
compute p all pressure t
compute ep all pe
compute ek all ke
variable eT equal etotal
variable ec equal ecouple
variable eC equal econserve

# Potencial energy per pair-wise interaction
compute patchPair all pair table/omp epair
compute swapPair all pair threebody/table epair

# Compute the pressure
compute press all pressure t ke virial
compute pressVirial all pressure t virial
compute pressVirialMod all pressure t pair bond angle

# Computes for the stress
compute cstress all stress/atom t ke pair bond angle
compute cstressVirial all stress/atom t virial
compute cstressVirialMod all stress/atom t pair bond angle
compute stress all reduce sum c_cstress[*]
compute stressVirial all reduce sum c_cstressVirial[*]
compute stressVirialMod all reduce sum c_cstressVirialMod[*]

# Compute potential energy per atom
compute potAtom all pe/atom pair

# DUMPS and FIXES

thermo ${NsaveStress}

# Save global energies and temperature
fix Energy all ave/time 1 ${Nsave} ${Nsave} c_t c_patchPair c_swapPair c_ep c_ek v_eT v_ec v_eC c_p file ${Dir}/${file1_name}

# Save Pressure and Stress tensor
fix fixStress5 all ave/time 1 ${NsaveStress} ${NsaveStress} c_p c_press[*] c_pressVirial[*] c_pressVirialMod[*] c_stress[*] c_stressVirial[*] c_stressVirialMod[*] file ${Dir}/${file2_name}

# Save atom positions with cluster id
dump dumpID all custom ${Ndump} ${Dir}/traj/${file5_name} id type x y z vx vy vz fx fy fz c_potAtom
dump_modify dumpID pbc yes # remap atoms via periodic boundary conditions

# RUN SIMULATION

# Brownian Dynamics using Langevin Thermostat

timestep ${tstep}

fix movePA PAm move linear 0.1 0.0 0.0


run ${steps}
