# Input script to debug the threebody/table command
# Initialization
units lj
dimension 3
boundary p p p

# Styles of atoms and that stuff
atom_style atomic
pair_style hybrid/overlay table/omp linear 128 threebody/table

newton on

# Create simulaiton box
region simulation_box block -$L $L -$L $L -$L $L
create_box 2 simulation_box

# Atom types
mass 1 1.0      # PA
mass 2 1.0      # PB

# Coefficients
include potential.in

# Particles
region spawn_box block -$L $L -$L $L -$L $L

# Patch B
create_atoms 1 single -0.2 0.0 0.0

# Patch B
create_atoms 1 single  0.4 0.0 0.0

# Patch B
create_atoms 1 single 0.0 0.646410 0.0

# Create groups
group PA type 2
group PB type 1

# Groups for the fix move
group P1 id 1
group P2 id 2
group P3 id 3


# Neighbor list
neighbor 1.8 bin # extra-distance style

# COMPUTES

# Compute global kinetic and potential energy and temperature
compute t all temp
compute p all pressure t
compute ep all pe
compute ek all ke
variable eT equal etotal
variable ec equal ecouple
variable eC equal econserve

# Potencial energy per pair-wise interaction
compute patchPair all pair table/omp epair
compute swapPair all pair threebody/table epair

# Compute the pressure
compute press all pressure t ke virial
compute pressVirial all pressure t virial
compute pressVirialMod all pressure t pair bond angle

# Computes for the stress
compute cstress all stress/atom t ke pair bond angle
compute cstressVirial all stress/atom t virial
compute cstressVirialMod all stress/atom t pair bond angle
compute stress all reduce sum c_cstress[*]
compute stressVirial all reduce sum c_cstressVirial[*]
compute stressVirialMod all reduce sum c_cstressVirialMod[*]

# Compute potential energy per atom
compute potAtom all pe/atom pair

# DUMPS and FIXES

thermo ${NsaveStress}

# Save global energies and temperature
fix Energy all ave/time 1 ${Nsave} ${Nsave} c_t c_patchPair c_swapPair c_ep c_ek v_eT v_ec v_eC c_p file ${Dir}/${file1_name}

# Save Pressure and Stress tensor
fix fixStress5 all ave/time 1 ${NsaveStress} ${NsaveStress} c_p c_press[*] c_pressVirial[*] c_pressVirialMod[*] c_stress[*] c_stressVirial[*] c_stressVirialMod[*] file ${Dir}/${file2_name}

# Save atom positions with cluster id
dump dumpID all custom ${Ndump} ${Dir}/traj/${file5_name} id type x y z vx vy vz fx fy fz c_potAtom
dump_modify dumpID pbc yes # remap atoms via periodic boundary conditions

# RUN SIMULATION

timestep ${tstep}

# Mover the second particles
fix moveP2 P2 move linear -0.1 0.0 0.0
run 2000

# Dejar de mover la particula 2
unfix moveP2
velocity P2 set 0.0 0.0 0.0

# Mover la tercera partícula
fix moveP3 P3 move linear 0.0 -0.1 0.0
run 3000
